# 20 styrene molecules
# three reactions defined

units real

boundary p p p

atom_style full

# kspace_style pppm 1.0e-4

#pair_style lj/class2/coul/long 8.5

pair_style table spline 1000
pair_coeff 1 1 fg-nb.table beads1-1 #7.0
pair_coeff 1 2 fg-nb.table beads1-2 #7.0
pair_coeff 1 3 fg-nb.table beads1-3 #7.0
pair_coeff 1 4 fg-nb.table beads1-4 #7.0
pair_coeff 2 2 fg-nb.table beads2-2 #7.0
pair_coeff 2 3 fg-nb.table beads2-3 #7.0
pair_coeff 2 4 fg-nb.table beads2-4 #7.0
pair_coeff 3 3 fg-nb.table beads3-3 #7.0
pair_coeff 3 4 fg-nb.table beads3-4 #7.0
pair_coeff 4 4 fg-nb.table beads4-4 #7.0


#bond_style class2
bond_style table spline 1000
bond_coeff 1 fg-bond.table bond1-2
bond_coeff 2 fg-bond.table bond2-3
bond_coeff 3 fg-bond.table bond3-4
bond_coeff 4 fg-bond.table bond1-5
bond_coeff 5 fg-bond.table bond5-6
bond_coeff 6 fg-bond.table bond6-7

#angle_style class2
angle_style table spline 1000
angle_coeff 1 fg-angle.table angle123
angle_coeff 2 fg-angle.table angle234
angle_coeff 3 fg-angle.table angle215
angle_coeff 4 fg-angle.table angle156
angle_coeff 5 fg-angle.table angle567


#dihedral_style class2
dihedral_style table/cut spline 1000
dihedral_coeff 1 aat 1.0 177 180 fg-dih.table dih1234
dihedral_coeff 2 aat 1.0 177 180 fg-dih.table dih5123
dihedral_coeff 3 aat 1.0 177 180 fg-dih.table dih6512
dihedral_coeff 4 aat 1.0 177 180 fg-dih.table dih7651


#improper_style class2

#special_bonds lj/coul 0 0 1

pair_modify tail yes mix sixthpower

variable T equal 310

read_data fg.data  &
  extra/bond/per/atom 5 &
  extra/angle/per/atom 15 &
  extra/dihedral/per/atom 15 &
  extra/improper/per/atom 25 &
  extra/special/per/atom 25

molecule mol1 fg_unreacted.molecule_template
molecule mol2 fg_reacted.molecule_template
#molecule mol3 chain_plus_styrene_unreacted.molecule_template
#molecule mol4 chain_plus_styrene_reacted.molecule_template
#molecule mol5 chain_chain_unreacted.molecule_template
#molecule mol6 chain_chain_reacted.molecule_template

thermo 100

dump 1 all xyz 5 fg.xyz

variable rmax equal 20 # initialize variable before bond/react
#fix myrxn all bond/react react myrxn1 all 1 0 v_rmax mol1 mol2 map_file.txt
#variable rmax equal 20+f_myrxn[1]/100

fix rxn1 all bond/react stabilization yes statted_grp .03 &
 react rxn1 all 5 0 v_rmax mol1 mol2 fg.map stabilize_steps 60 prob 0.50 12345 molecule inter modify_create overlap 5 &
 variable rmax equal 3+f_rxn1[1]/100
 #react rxn2 all 1 0 3.0 mol3 mol4 chain_plus_styrene_map stabilize_steps 100 &
 #react rxn3 all 1 0 5.0 mol5 mol6 chain_chain_map stabilize_steps 100

fix 1 statted_grp_REACT nvt temp $T $T 100

fix 4 bond_react_MASTER_group temp/rescale 1 $T $T 10 1

thermo_style custom step temp press density f_rxn1[1] #f_rxn1[2] f_rxn1[3]
dump local 100

run 10000

# write_restart restart_longrun nofix
# write_data restart_longrun.data
